*Heading
** Job name: beam_200x10x10 Model name: Model-1
** Generated by: Abaqus/CAE Version 6.8-1
*Preprint, echo=NO, model=NO, history=NO, contact=NO
**
** PARTS
**
*Part, name=beam
*Node
      1,  0.200000003, 0.00999999978, 0.00999999978
      2,  0.200000003, 0.00899999961, 0.00999999978
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*Element, type=C3D8
    1,   122,   123,   134,   133,     1,     2,    13,    12
    2,   123,   124,   135,   134,     2,     3,    14,    13
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*Nset, nset=_PickedSet2, internal, generate
     1,  24321,      1
*Elset, elset=_PickedSet2, internal, generate
     1,  20000,      1
** Section: Section-1
*Solid Section, elset=_PickedSet2, material=elastic

*End Part
**
**
** ASSEMBLY
**
*Assembly, name=Assembly
**
*Instance, name=beam-1, part=beam
*End Instance
**
*Nset, nset=_PickedSet4, internal, instance=beam-1, generate
 24201,  24321,      1
*Elset, elset=_PickedSet4, internal, instance=beam-1, generate
 19901,  20000,      1
*Nset, nset=_PickedSet5, internal, instance=beam-1
 111,
*End Assembly
**
** MATERIALS
**
*Material, name=elastic
*Density
7800.,
*Elastic
 2e+11, 0.3
** ----------------------------------------------------------------
**
** STEP: Step-1
**
*Step, name=Step-1
*Static
1., 1., 1e-05, 1.
**
** BOUNDARY CONDITIONS
**
** Name: encastre Type: Displacement/Rotation
*Boundary
_PickedSet4, 1, 1
_PickedSet4, 2, 2
_PickedSet4, 3, 3
_PickedSet4, 4, 4
_PickedSet4, 5, 5
_PickedSet4, 6, 6
**
** LOADS
**
** Name: load   Type: Concentrated force
*Cload
_PickedSet5, 2, -12.5
**
** OUTPUT REQUESTS
**
*Restart, write, frequency=0
**
** FIELD OUTPUT: F-Output-1, F-Output-2
**
*Output, field, variable=PRESELECT
**
** HISTORY OUTPUT: H-Output-1
**
*Output, history, variable=PRESELECT
*End Step
