*Heading
** Job name: Job-1 Model name: Model-1
** Generated by: Abaqus/CAE 6.11-3
*Preprint, echo=NO, model=NO, history=NO, contact=NO
**
** PARTS
**
*Part, name=beam
*Node
      1,          0.5, 0.0500000007, 0.0500000007
      2,          0.5,           0., 0.0500000007
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*Element, type=C3D8R
 1,  5,  6,  8,  7,  1,  2,  4,  3
 2,  9, 10, 12, 11,  5,  6,  8,  7
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*Nset, nset=_PickedSet2, internal, generate
  1,  44,   1
*Elset, elset=_PickedSet2, internal, generate
  1,  10,   1
*Nset, nset=encastre, generate
 41,  44,   1
*Nset, nset=load, generate
 1,  4,  1
*Elset, elset=tip
 1,
*Nset, nset=pin, generate
 1,  4,  1
** Section: beam
*Solid Section, elset=_PickedSet2, controls=EC-1, material=steel
,
*End Part
**
**
** ASSEMBLY
**
*Assembly, name=Assembly
**
*Instance, name=beam-1, part=beam
*End Instance
**
*End Assembly
**
** ELEMENT CONTROLS
**
*Section Controls, name=EC-1, DISTORTION CONTROL=NO, kinematic split=CENTROID, hourglass=STIFFNESS
0., 1., 1., 0., 0.
*Amplitude, name=load
             0.,              0.,           0.002,              1.,              1.,              1.
**
** MATERIALS
**
*Material, name=steel
*Density
7850.,
*Elastic
 2.1e+11, 0.3
*Plastic
   2e+08,    0.
 2.5e+08, 0.003
**
** BOUNDARY CONDITIONS
**
** Name: encastre Type: Symmetry/Antisymmetry/Encastre
*Boundary
beam-1.encastre, PINNED
** Name: pin Type: Symmetry/Antisymmetry/Encastre
*Boundary
beam-1.pin, XSYMM
** ----------------------------------------------------------------
**
** STEP: dynamic
**
*Step, name=dynamic
*Dynamic, Explicit
, 0.01
*Bulk Viscosity
0., 0.
**
** LOADS
**
** Name: load   Type: Concentrated force
*Cload, amplitude=load
beam-1.load, 2, -2000.
**
** OUTPUT REQUESTS
**
*Restart, write, number interval=1, time marks=NO
**
** FIELD OUTPUT: F-Output-1
**
*Output, field, variable=PRESELECT
**
** FIELD OUTPUT: F-Output-2
**
*Output, field, number interval=250
*Element Output, directions=YES
PE, PEEQ, PEMAG
**
** HISTORY OUTPUT: H-Output-1
**
*Output, history, variable=PRESELECT
**
** HISTORY OUTPUT: H-Output-2
**
*Output, history, time interval=4e-05
*Node Output, nset=beam-1.load
A1, A2, A3, CF2, U1, U2, U3, V1
V2, V3
**
** HISTORY OUTPUT: H-Output-3
**
*Element Output, elset=beam-1.tip
MISES, PE11, PE12, PE13, PE22, PE23, PE33, PEEQ, PEMAG, PEP, S11, S12, S13, S22, S23, S33
*End Step
