*Heading
** Job name: Job-1 Model name: Model-1
** Generated by: Abaqus/CAE 6.11-3
*Preprint, echo=NO, model=NO, history=NO, contact=NO
**
** PARTS
**
*Part, name=beam
*Node
      1,          0.5, 0.0500000007, 0.0500000007
      2,          0.5, 0.0375000015, 0.0500000007
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*Element, type=C3D8R
  1,   26,   27,   32,   31,    1,    2,    7,    6
  2,   27,   28,   33,   32,    2,    3,    8,    7
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*Nset, nset=_PickedSet2, internal, generate
    1,  1025,     1
*Elset, elset=_PickedSet2, internal, generate
   1,  640,    1
*Nset, nset=lock, generate
 1001,  1025,     1
*Nset, nset=load, generate
  1,  25,   1
*Nset, nset=load-edge
  1,  5, 21, 25
*Nset, nset=load-line
  2,  3,  4,  6, 10, 11, 15, 16, 20, 22, 23, 24
*Nset, nset=load-inner
  7,  8,  9, 12, 13, 14, 17, 18, 19
** Section: beam-section
*Solid Section, elset=_PickedSet2, controls=EC-1, material=steel
,
*End Part
**
**
** ASSEMBLY
**
*Assembly, name=Assembly
**
*Instance, name=beam-1, part=beam
*End Instance
**
*End Assembly
**
** ELEMENT CONTROLS
**
*Section Controls, name=EC-1, DISTORTION CONTROL=NO, ELEMENT DELETION=NO, kinematic split=CENTROID, hourglass=STIFFNESS
0., 1., 1., 0., 0.
*Amplitude, name=load
             0.,              0.,           1e-05,              0.,    1.000001e-05,              1.,         7.5e-05,              1.
   7.500001e-05,              0.,            100.,              0.
**
** MATERIALS
**
*Material, name=steel
*Density
7850.,
*Elastic
 2e+11, 0.3
**
** BOUNDARY CONDITIONS
**
** Name: encastre Type: Symmetry/Antisymmetry/Encastre
*Boundary
beam-1.lock, PINNED
** ----------------------------------------------------------------
**
** STEP: dynamic-explicit
**
*Step, name=dynamic-explicit, nlgeom=NO
*Dynamic, Explicit, direct user control
2.5e-07, 0.0005
*Bulk Viscosity
0., 0.
**
** LOADS
**
** Name: load-edges   Type: Concentrated force
*Cload, amplitude=load
beam-1.load-line, 1, -125.
** Name: load-inner   Type: Concentrated force
*Cload, amplitude=load
beam-1.load-inner, 1, -250.
** Name: load-tips   Type: Concentrated force
*Cload, amplitude=load
beam-1.load-edge, 1, -62.5
**
** OUTPUT REQUESTS
**
*Restart, write, number interval=1, time marks=NO
**
** FIELD OUTPUT: F-Output-1
**
*Output, field, variable=PRESELECT
**
** HISTORY OUTPUT: H-Output-1
**
*Output, history, variable=PRESELECT
**
** HISTORY OUTPUT: H-Output-2
**
*Output, history, time interval=2e-06
*Node Output, nset=beam-1.load
A1, A2, A3, CF1, U1, U2, U3, V1
V2, V3
*End Step
